# LAMMPS Common Initialization Template

# LAMMPS input script
clear
units           metal
atom_style      {{ atom_style | default('atomic') }}
boundary        p p p

{% if neighbor_list is defined %}
neighbor        {{ neighbor_list }} bin
{{ neigh_modify_command }}
{% endif %}
