mass 1*12 74.921595 #As 2D
group layer_1 type 1 2 3 4
group layer_2 type 5 6 7 8
group layer_3 type 9 10 11 12
pair_style hybrid sw sw sw  lj/cut 11.0
pair_coeff * * sw 1 afm/p-arsenene/100x_100y/sub_aSi_tip_Si_r25/K300/potentials/p-arsenene.sw As1  As2  As3  As4  NULL  NULL  NULL  NULL  NULL  NULL  NULL  NULL # 2D Layer 1
pair_coeff * * sw 2 afm/p-arsenene/100x_100y/sub_aSi_tip_Si_r25/K300/potentials/p-arsenene.sw NULL  NULL  NULL  NULL  As1  As2  As3  As4  NULL  NULL  NULL  NULL # 2D Layer 2
pair_coeff * * sw 3 afm/p-arsenene/100x_100y/sub_aSi_tip_Si_r25/K300/potentials/p-arsenene.sw NULL  NULL  NULL  NULL  NULL  NULL  NULL  NULL  As1  As2  As3  As4 # 2D Layer 3
pair_coeff 1*4 5*8 lj/cut 0.0133992906 4.23
pair_coeff 1*4 9*12 lj/cut 0.0133992906 4.23
pair_coeff 5*8 9*12 lj/cut 0.0133992906 4.23
