mass 1*2 102.9055 #Rh 2D
mass 3*6 127.6 #Te 2D
group layer_1 type 1 3 4
group layer_2 type 2 5 6
pair_style hybrid sw sw  lj/cut 11.0
pair_coeff * * sw 1 afm/t-RhTe2/100x_100y/sub_aSi_tip_Si_r25/K300/potentials/t-RhTe2.sw Rh  NULL  Te1  Te2  NULL  NULL # 2D Layer 1
pair_coeff * * sw 2 afm/t-RhTe2/100x_100y/sub_aSi_tip_Si_r25/K300/potentials/t-RhTe2.sw NULL  Rh  NULL  NULL  Te1  Te2 # 2D Layer 2
pair_coeff 1 2 lj/cut 0.0022982602 2.929
pair_coeff 1 5*6 lj/cut 0.006298002047471773 3.6994999999999996
pair_coeff 2 3*4 lj/cut 0.006298002047471773 3.6994999999999996
pair_coeff 3*4 5*6 lj/cut 0.0172586332 4.47
