mass 1*3 28.085 #Si sub
mass 4*6 28.085 #Si tip
mass 7*18 95.95 #Mo 2D
mass 19*42 32.06 #S 2D
group sub_all type 1 2 3
group sub_fix type 2
group sub_thermo type 3
group tip_all type 4 5 6
group tip_fix type 5
group tip_thermo type 6
group 2D_all type 7 8 9 10 11 12 13 14 15 16 17 18 19 20 21 22 23 24 25 26 27 28 29 30 31 32 33 34 35 36 37 38 39 40 41 42
group layer_1 type 7 8 9 10 19 20 21 22 23 24 25 26
group layer_2 type 11 12 13 14 27 28 29 30 31 32 33 34
group layer_3 type 15 16 17 18 35 36 37 38 39 40 41 42
group mobile union tip_thermo sub_thermo
pair_style hybrid sw sw sw sw sw  lj/cut 8.0
pair_coeff * * sw 1 afm/h-MoS2/100x_100y/sub_aSi_tip_Si_r25/K300/potentials/Si.sw Si  Si  Si  NULL  NULL  NULL  NULL  NULL  NULL  NULL  NULL  NULL  NULL  NULL  NULL  NULL  NULL  NULL  NULL  NULL  NULL  NULL  NULL  NULL  NULL  NULL  NULL  NULL  NULL  NULL  NULL  NULL  NULL  NULL  NULL  NULL  NULL  NULL  NULL  NULL  NULL  NULL # interlayer Sub
pair_coeff * * sw 2 afm/h-MoS2/100x_100y/sub_aSi_tip_Si_r25/K300/potentials/Si.sw NULL  NULL  NULL  Si  Si  Si  NULL  NULL  NULL  NULL  NULL  NULL  NULL  NULL  NULL  NULL  NULL  NULL  NULL  NULL  NULL  NULL  NULL  NULL  NULL  NULL  NULL  NULL  NULL  NULL  NULL  NULL  NULL  NULL  NULL  NULL  NULL  NULL  NULL  NULL  NULL  NULL # interlayer Tip
pair_coeff * * sw 3 afm/h-MoS2/100x_100y/sub_aSi_tip_Si_r25/K300/potentials/h-MoS2.sw NULL  NULL  NULL  NULL  NULL  NULL  Mo1  Mo2  Mo3  Mo4  NULL  NULL  NULL  NULL  NULL  NULL  NULL  NULL  S1  S2  S3  S4  S5  S6  S7  S8  NULL  NULL  NULL  NULL  NULL  NULL  NULL  NULL  NULL  NULL  NULL  NULL  NULL  NULL  NULL  NULL # interlayer '2D' Layer 1
pair_coeff * * sw 4 afm/h-MoS2/100x_100y/sub_aSi_tip_Si_r25/K300/potentials/h-MoS2.sw NULL  NULL  NULL  NULL  NULL  NULL  NULL  NULL  NULL  NULL  Mo1  Mo2  Mo3  Mo4  NULL  NULL  NULL  NULL  NULL  NULL  NULL  NULL  NULL  NULL  NULL  NULL  S1  S2  S3  S4  S5  S6  S7  S8  NULL  NULL  NULL  NULL  NULL  NULL  NULL  NULL # interlayer '2D' Layer 2
pair_coeff * * sw 5 afm/h-MoS2/100x_100y/sub_aSi_tip_Si_r25/K300/potentials/h-MoS2.sw NULL  NULL  NULL  NULL  NULL  NULL  NULL  NULL  NULL  NULL  NULL  NULL  NULL  NULL  Mo1  Mo2  Mo3  Mo4  NULL  NULL  NULL  NULL  NULL  NULL  NULL  NULL  NULL  NULL  NULL  NULL  NULL  NULL  NULL  NULL  S1  S2  S3  S4  S5  S6  S7  S8 # interlayer '2D' Layer 3
pair_coeff 1*3 7*18 lj/cut 0.006506244304790185 3.6734999999999998
pair_coeff 4*6 7*18 lj/cut 0.006506244304790185 3.6734999999999998
pair_coeff 1*3 19*42 lj/cut 0.014391684663430299 4.165
pair_coeff 4*6 19*42 lj/cut 0.014391684663430299 4.165
pair_coeff 7*10 11*14 lj/cut 0.0024283504 3.052
pair_coeff 7*10 15*18 lj/cut 0.0024283504 3.052
pair_coeff 11*14 15*18 lj/cut 0.0024283504 3.052
pair_coeff 7*10 27*34 lj/cut 0.005371463408372865 3.5435
pair_coeff 7*10 35*42 lj/cut 0.005371463408372865 3.5435
pair_coeff 11*14 35*42 lj/cut 0.005371463408372865 3.5435
pair_coeff 11*14 19*26 lj/cut 0.005371463408372865 3.5435
pair_coeff 15*18 19*26 lj/cut 0.005371463408372865 3.5435
pair_coeff 15*18 27*34 lj/cut 0.005371463408372865 3.5435
pair_coeff 19*26 27*34 lj/cut 0.0118815716 4.035
pair_coeff 19*26 35*42 lj/cut 0.0118815716 4.035
pair_coeff 27*34 35*42 lj/cut 0.0118815716 4.035
pair_coeff 1*3 4*6  lj/cut 0.0174320868 4.295
